Concept_Plane
0.0
0 0 0.0
0.84 0.3 2.4
0.3706 0.0000 0.0000
0.01
SURFACE
Main Wing
10 1.0
YDUPLICATE
0.0
ANGLE
0.0000
SECTION
0.0000 0.0000 0.0000 0.4500 0.0000 5 -2.0
NACA
2412
SECTION
0.2500 1.2000 0.0419 0.2500 0.0000 0 0.0
NACA
2412
CONTROL
Aileron 1.0 0.7500 0.0 1.0 0.0 -1
SURFACE
V-Tail
10 1.0
YDUPLICATE
0.0
ANGLE
0.0000
SECTION
1.8000 0.0000 0.0000 0.3500 0.0000 5 -2.0
NACA
0012
SECTION
2.0000 0.5000 0.5000 0.2000 0.0000 0 0.0
NACA
0012
CONTROL
Rudder 1.0 0.7000 0.0 1.0 0.0 1
